<?xml version="1.0" encoding="ISO-8859-1"?>
<!DOCTYPE scn>
<Node name="root" gravity="0 -9.81 0" dt="0.01">
	<!--- @VisualStyle: parámetros de visualización. -->
	<VisualStyle name="visualStyle1" displayFlags="showBehavior" />
	<!--- @DefaultPipeline: Fuente de información por defecto sobre la detección
		de colisiones y el modelado. -->
	<DefaultPipeline name="DefaultCollisionPipeline"
		verbose="0" draw="0" depth="6" />
	<!--- @BruteForceDetection: detección de colisiones mediante pruebas por
		pares (por cada par de elementos colisionables se hace una prueba continuamente)
		-->
	<BruteForceDetection name="Detection" />
	<!--- @MinProximityIntersection: Conjunto de métodos que deciden si dos
		elementos colisionables (primitivas) están lo suficientemente cerca para
		chocar. -->
	<MinProximityIntersection name="Proximity"
		alarmDistance="3" contactDistance="2" />
	<!--- @DefaultContactManager: Gestor de las reacciones que se producen en
		respuesta a los choques. -->
	<DefaultContactManager name="Response" response="default" />
	<Node name="Tetrahedrons Mesh">
		<!--- @MeshGmshLoader: Cargador de mallas en formato "Gmsh". -->
		<MeshGmshLoader name="loader" filename="mesh/cylinder.msh"
			tetrahedraGroups="  -1 0 2430" />
		<!--- @TetrahedronSetTopologyContainer: Contenedor de la topología en malla
			de tetraedros dinámicas (se pueden deformar en tiempo de ejecución) -->
		<TetrahedronSetTopologyContainer name="Container"
			position="@loader.position" edges="@loader.edges" triangles="@loader.triangles"
			tetrahedra="@loader.tetras" />
		<!--- @MechanicalObject: Describe los estados -vectores- mecánicos del
			nodo. -->
		<MechanicalObject template="Vec3d" name="Volume"
			position="0 0 0" velocity="0 0 0" force="0 0 0" externalForce="0 0 0"
			restScale="1" />
		<!--- @TetrahedronSetGeometryAlgorithms: @param drawTetrahedra: Dibuja
			los tetraedros. @param drawColorTetrahedra: Color con el que se pintan los
			tetraedros. -->
		<TetrahedronSetGeometryAlgorithms
			template="Vec3d" name="GeomAlgo" drawTetrahedra="1"
			drawColorTetrahedra="1 1 0" />
	</Node>
</Node>
